*Heading
** Job name: Job-1 Model name: Model-1
** Generated by: Abaqus/CAE 2024.HF6
*Preprint, echo=NO, model=NO, history=NO, contact=NO
**
** PARTS
**
*Part, name=Part-1
*Node
      1,           0.,          0.5
      2,           1.,          0.5
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*Element, type=DC2D3
  1,   1,  14, 192
  2, 192,  93,   1
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*Nset, nset=bottom
   6,   7,  13, 107, 108, 109
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*Elset, elset=bottom
  179,  180,  182,  485,  574,  596
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*Nset, nset=tiles
   1,   2,   3,   4,  14,  15
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*Elset, elset=tiles, generate
   1,  160,    1
*Nset, nset=hole
  10,  11,  12, 155, 156, 157, 158, 159, 160, 161, 162, 163, 164, 165
*Elset, elset=hole
 520, 566, 611, 612, 616, 704, 706, 707, 708, 709, 712, 714, 717
*Nset, nset=left
   1,   4,  10,  12,  13,  93, 150, 151, 152, 153, 154, 166, 167, 168
*Elset, elset=left
   2,  82, 520, 523, 524, 564, 613, 619, 630, 703, 721, 827
*Nset, nset=outsurface
   7,   8, 110, 111, 112, 113
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*Elset, elset=outsurface
 165, 182, 202, 366, 389, 404
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*Nset, nset=floorstructure
   1,   2,   5,   6,  10,  11
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*Elset, elset=floorstructure, generate
  511,  1714,     1
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*Nset, nset=wallstructure
   2,   3,   5,   6,   7,   8
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*Elset, elset=wallstructure, generate
 161,  510,    1
** Section: wall
*Solid Section, elset=wallstructure, material=wallstructure
,
*End Part
**
**
** ASSEMBLY
**
*Assembly, name=Assembly
**
*Instance, name=Part-1-1, part=Part-1
*End Instance
**
*Nset, nset=Set-1, instance=Part-1-1
   3,   4,   9,  54,  55,  56
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*Elset, elset=Set-1, instance=Part-1-1
  82,  84,  86,  88,  90,  92
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*Nset, nset=Set-2, instance=Part-1-1
   7,   8, 110, 111, 112, 113
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*Elset, elset=Set-2, instance=Part-1-1
 165, 182, 202, 366, 389, 404
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*End Assembly
**
** MATERIALS
**
*Material, name=substructure
*Conductivity
2.,
*Material, name=tiles
*Conductivity
1.,
*Material, name=wallstructure
*Conductivity
 0.1,
** ----------------------------------------------------------------
**
** STEP: Step-1
**
*Step, name=Step-1, nlgeom=NO
*Heat Transfer, steady state, deltmx=0.
1., 1., 1e-05, 1.,
**
** BOUNDARY CONDITIONS
**
** Name: BC-1 Type: Temperature
*Boundary
Set-1, 11, 11, 20.
** Name: BC-2 Type: Temperature
*Boundary
Set-2, 11, 11, -10.
**
** OUTPUT REQUESTS
**
*Restart, write, frequency=0
**
** FIELD OUTPUT: F-Output-1
**
*Output, field, variable=PRESELECT
*Output, history, frequency=0
*End Step
